OpenVSP model (file version 5), 2 components.
Geometry view with OpenVSP parameter names; values to 6 digits, angles in degrees, lengths in the model's unit.
Overall bounding box: X_Min=0 X_Len=7.66863 Y_Min=-6.00136 Y_Len=12.0027 Z_Min=-0.676556 Z_Len=0.954195

Blank "wing_comps"
  location (X Y Z) 3.86 0 -0.4, rotation 5 1.873 0

Wing "cruise_wing", child of "wing_comps"
  location (X Y Z) 3.86 0 -0.4, rotation 5 1.873 0; relative location 0 0 0, rotation 0 0 0
  symmetric about XZ
  bounding box size 3.81372 12.0027 0.954195
  totals: TotalSpan=12 TotalProjectedSpan=12 TotalChord=0.891604 TotalArea=13.3572 TotalAR=10.7807 MAC=1.29251
  root: chord 2.1, twist 0, airfoil file "NASA EET AR12 Lowspeed eta=0.000 cruise"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 BaseThickChord=0.146907 ThickChord=0.146907
  sections:
    n   Span   Root_Chord  Tip_Chord  Area       Sweep   Sweep_Location  Dihedral  Twist      Twist_Location  tip airfoil
    1   0.576  2.1         1.845      1.13616    28.862  0               0         -0.39276   0.25            airfoil file "NASA EET AR12 Lowspeed eta=0.096 cruise"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 BaseThickChord=0.142166 ThickChord=0.142166
    2   1.722  1.845       1.11667    2.55       28.862  0               0         -2.61371   0.25            airfoil file "NASA EET AR12 Lowspeed eta=0.383 cruise"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 BaseThickChord=0.117587 ThickChord=0.117587
    3   0.402  1.11667     1.04971    0.435442   28.862  0               0         -2.69135   0.25            airfoil file "NASA EET AR12 Lowspeed eta=0.450 cruise (derived)"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 BaseThickChord=0.116576 ThickChord=0.116576
    4   0.39   1.04971     0.984743   0.396718   28.862  0               0         -2.79785   0.25            airfoil file "NASA EET AR12 Lowspeed eta=0.710 cruise (derived)"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 BaseThickChord=0.115065 ThickChord=0.115065
    5   0.195  0.984743    0.952259   0.188857   28.862  0               0         -2.8511    0.25            airfoil file "NASA EET AR12 Lowspeed eta=0.710 cruise (derived)"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 BaseThickChord=0.114371 ThickChord=0.114371
    6   0.195  0.952259    0.919775   0.182523   28.862  0               0         -2.90434   0.25            airfoil file "NASA EET AR12 Lowspeed eta=0.710 cruise (derived)"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 BaseThickChord=0.113677 ThickChord=0.113677
    7   0.195  0.919775    0.887291   0.176189   28.862  0               0         -2.1905    0.25            airfoil file "NASA EET AR12 Lowspeed eta=0.710 cruise (derived)"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 BaseThickChord=0.112982 ThickChord=0.112982
    8   0.195  0.887291    0.854808   0.169855   28.862  0               0         -0.693879  0.25            airfoil file "NASA EET AR12 Lowspeed eta=0.710 cruise (derived)"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 BaseThickChord=0.112288 ThickChord=0.112288
    9   0.195  0.854808    0.822324   0.16352    28.862  0               0         -0.095644  0.25            airfoil file "NASA EET AR12 Lowspeed eta=0.710 cruise (derived)"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 BaseThickChord=0.111593 ThickChord=0.111593
    10  0.195  0.822324    0.78984    0.157186   28.862  0               0         -0.578613  0.25            airfoil file "NASA EET AR12 Lowspeed eta=0.710 cruise (derived)"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 BaseThickChord=0.11101 ThickChord=0.11101
    11  0.213  0.78984     0.75436    0.164457   28.862  0               0         -1.49079   0.25            airfoil file "NASA EET AR12 Lowspeed eta=0.852 cruise (derived)"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 BaseThickChord=0.109661 ThickChord=0.109661
    12  0.213  0.75436     0.71888    0.1569     28.862  0               0         -1.4992    0.25            airfoil file "NASA EET AR12 Lowspeed eta=0.852 cruise (derived)"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 BaseThickChord=0.108423 ThickChord=0.108423
    13  0.213  0.71888     0.6834     0.149343   28.862  0               0         -0.847658  0.25            airfoil file "NASA EET AR12 Lowspeed eta=0.852 cruise (derived)"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 BaseThickChord=0.107185 ThickChord=0.107185
    14  0.213  0.6834      0.64792    0.141786   28.862  0               0         -0.724794  0.25            airfoil file "NASA EET AR12 Lowspeed eta=0.852 cruise (derived)"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 BaseThickChord=0.106048 ThickChord=0.106048
    15  0.18   0.64792     0.61794    0.113927   28.862  0               0         -1.13768   0.25            airfoil file "NASA EET AR12 Lowspeed eta=0.882 cruise"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 BaseThickChord=0.104708 ThickChord=0.104708
    16  0.264  0.61794     0.57396    0.157331   28.862  0               0         -2.08306   0.25            airfoil file "NASA EET AR12 Lowspeed eta=0.970 cruise"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 BaseThickChord=0.102237 ThickChord=0.102237
    17  0.264  0.57396     0.52998    0.14572    28.862  0               0         -3.575     0.25            airfoil file "NASA EET AR12 Lowspeed eta=0.970 cruise"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 BaseThickChord=0.0999398 ThickChord=0.0999398
    18  0.18   0.52998     0.5        0.0926982  28.862  0               0         -4.94857   0.25            airfoil file "NASA EET AR12 Lowspeed eta=1.000 cruise"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 BaseThickChord=0.0979007 ThickChord=0.0979007

VSPAERO settings: Sref=12 bref=12 cref=1.11667 Xcg=5.5 Ycg=0 Zcg=-0.224 AlphaStart=1 AlphaEnd=1 AlphaNpts=1 BetaStart=0 BetaEnd=0 BetaNpts=1 MachStart=0.16 MachEnd=0 MachNpts=1 ReCref=1e+07 Vinf=100 Rho=0.002377
