OpenVSP model (file version 4), 36 components.
Geometry view with OpenVSP parameter names; values to 6 digits, angles in degrees, lengths in the model's unit.
Overall bounding box: X_Min=0 X_Len=10.3188 Y_Min=-5.98886 Y_Len=11.9777 Z_Min=-0.615856 Z_Len=2.99256

Blank "wing_comps"
  location (X Y Z) 3.86 0 -0.4, rotation 5 1.873 0

Wing "trapezoidal_reference", child of "wing_comps"
  location (X Y Z) 3.86 0 -0.4, rotation 5 1.873 0; relative location 0 0 0, rotation 0 0 0
  symmetric about XZ
  bounding box size 3.80504 11.9748 0.474638
  totals: TotalSpan=12 TotalProjectedSpan=12 TotalChord=1 TotalArea=12
  root: chord 1.5, twist 0, NACA 4-series Camber=0 CamberLoc=0.2 ThickChord=0.01
  sections:
    n  Span  Root_Chord  Tip_Chord  Area  Sweep  Sweep_Location  Dihedral  Twist     Twist_Location  tip airfoil
    1  6     1.5         0.5        6     27     0.25            0         -4.11495  0.25            as above

Wing "cruise_wing", child of "wing_comps"
  location (X Y Z) 3.86 0 -0.4, rotation 5 1.873 0; relative location 0 0 0, rotation 0 0 0
  symmetric about XZ
  bounding box size 3.80488 11.9777 0.617052
  totals: TotalSpan=12 TotalProjectedSpan=12 TotalChord=0.987133 TotalArea=13.3572
  root: chord 2.1, twist 0, airfoil file "NASA EET AR12 Lowspeed eta=0.000 cruise"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 ThickChord=0.1
  sections:
    n  Span   Root_Chord  Tip_Chord  Area       Sweep   Sweep_Location  Dihedral  Twist     Twist_Location  tip airfoil
    1  0.576  2.1         1.845      1.13616    28.862  0               0         -0.39276  0.25            airfoil file "NASA EET AR12 Lowspeed eta=0.096 cruise"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 ThickChord=0.1
    2  1.722  1.845       1.11667    2.55       28.862  0               0         -2.61371  0.25            airfoil file "NASA EET AR12 Lowspeed eta=0.383 cruise"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 ThickChord=0.1
    3  0.402  1.11667     1.04971    0.435442   28.862  0               0         -2.69135  0.25            airfoil file "NASA EET AR12 Lowspeed eta=0.450 cruise (derived)"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 ThickChord=0.1
    4  1.56   1.04971     0.78984    1.43485    28.862  0               0         -3.11734  0.25            airfoil file "NASA EET AR12 Lowspeed eta=0.710 cruise (derived)"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 ThickChord=0.1
    5  0.852  0.78984     0.64792    0.612486   28.862  0               0         -3.49547  0.25            airfoil file "NASA EET AR12 Lowspeed eta=0.852 cruise (derived)"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 ThickChord=0.1
    6  0.18   0.64792     0.61794    0.113927   28.862  0               0         -3.59744  0.25            airfoil file "NASA EET AR12 Lowspeed eta=0.882 cruise"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 ThickChord=0.1
    7  0.528  0.61794     0.52998    0.303051   28.862  0               0         -3.96118  0.25            airfoil file "NASA EET AR12 Lowspeed eta=0.970 cruise"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 ThickChord=0.1
    8  0.18   0.52998     0.5        0.0926982  28.862  0               0         -4.11495  0.25            airfoil file "NASA EET AR12 Lowspeed eta=1.000 cruise"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 ThickChord=0.1

Wing "main_wing", child of "wing_comps"
  location (X Y Z) 3.86 0 -0.4, rotation 5 1.873 0; relative location 0 0 0, rotation 0 0 0
  symmetric about XZ
  bounding box size 3.80488 11.9777 0.617051
  totals: TotalSpan=12 TotalProjectedSpan=12 TotalChord=1.05094 TotalArea=13.3572
  root: chord 2.1, twist 0, airfoil file "NASA EET AR12 Lowspeed eta=0.000 cruise"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 ThickChord=0.1
  sections:
    n   Span   Root_Chord  Tip_Chord  Area        Sweep   Sweep_Location  Dihedral  Twist     Twist_Location  tip airfoil
    1   0.576  2.1         1.845      1.13616     28.862  0               0         -0.39276  0.25            airfoil file "NASA EET AR12 Lowspeed eta=0.096 cruise"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 ThickChord=0.1
    2   0.006  1.845       1.84246    0.0110624   28.862  0               0         -0.4005   0.25            airfoil file "NASA EET AR12 Lowspeed eta=0.096 main"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 ThickChord=0.1
    3   1.71   1.84246     1.11921    2.53223     28.862  0               0         -2.60597  0.25            airfoil file "NASA EET AR12 Lowspeed eta=0.383 main"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 ThickChord=0.1
    4   0.006  1.11921     1.11667    0.00670764  28.862  0               0         -2.61371  0.25            airfoil file "NASA EET AR12 Lowspeed eta=0.383 main+flap"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 ThickChord=0.1
    5   0.402  1.11667     1.04971    0.435442    28.862  0               0         -2.69135  0.25            airfoil file "NASA EET AR12 Lowspeed eta=0.450 main+flap"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 ThickChord=0.1
    6   0.006  1.04971     1.04871    0.00629526  28.862  0               0         -2.69299  0.25            airfoil file "NASA EET AR12 Lowspeed eta=0.450 main"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 ThickChord=0.1
    7   1.548  1.04871     0.79084    1.42381     28.862  0               0         -3.1157   0.25            airfoil file "NASA EET AR12 Lowspeed eta=0.710 main"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 ThickChord=0.1
    8   0.006  0.79084     0.78984    0.00474204  28.862  0               0         -3.11734  0.25            airfoil file "NASA EET AR12 Lowspeed eta=0.710 main+flap"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 ThickChord=0.1
    9   0.852  0.78984     0.64792    0.612486    28.862  0               0         -3.49547  0.25            airfoil file "NASA EET AR12 Lowspeed eta=0.852 main"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 ThickChord=0.1
    10  0.702  0.64792     0.53098    0.413794    28.862  0               0         -3.95723  0.25            airfoil file "NASA EET AR12 Lowspeed eta=0.970 main"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 ThickChord=0.1
    11  0.006  0.53098     0.52998    0.00318288  28.862  0               0         -3.96118  0.25            airfoil file "NASA EET AR12 Lowspeed eta=0.970 cruise"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 ThickChord=0.1
    12  0.18   0.52998     0.5        0.0926982   28.862  0               0         -4.11495  0.25            airfoil file "NASA EET AR12 Lowspeed eta=1.000 cruise"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 ThickChord=0.1

Blank "eta_097", child of "wing_comps"
  location (X Y Z) 4.181 0.580279 -0.363, rotation 5 1.472 0; relative location 0.321277 0.581296 -0.0032165, rotation 0 -0.401 0

Blank "slat_in_ref", child of "eta_097"
  location (X Y Z) 4.39475 0.572059 -0.256768, rotation 5 1.472 0; relative location 0.210945 0.00107 0.112, rotation 0 0 0

Custom "slat_in_track", child of "slat_in_ref"
  location (X Y Z) 4.21384 0.584404 -0.38492, rotation 7.77546 1.47027 -1.05587; relative location -0.177546 0.00112836 -0.133345, rotation 2.77454 0 -0.984598
  bounding box size 0.0415661 1.69549 0.240489
  Deflect: Inboard_DX=-0.177546 Inboard_DZ=-0.133345 Outboard_DX=-0.148162 Outboard_DZ=-0.050583
  Design: Length=1.71
  custom script FlapTrack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

Hinge "slat_in_hinge", child of "slat_in_track"
  location (X Y Z) 4.21384 0.584404 -0.38492, rotation -72.2566 -60.5845 -78.6785; relative location 0 0 0, rotation -82.3697 -61.8531 -81.3609
  Hinge: JointRotMax=360 JointRotMaxFlag=0 JointRotMin=-360 JointRotMinFlag=0 JointRotate=-34.7279 JointRotateFlag=1 JointTransMax=1000 JointTransMaxFlag=0 JointTransMin=-1000 JointTransMinFlag=0 JointTranslate=0 JointTranslateFlag=0 OrientRotFlag=1 PrimOffAbsRelFlag=1 PrimType=0 PrimULoc=0 PrimVecAbsRelFlag=1 PrimWLoc=0 PrimXOff=0 PrimXOffRel=0 PrimXVec=0.481582 PrimXVecRel=0.9022 PrimYOff=0 PrimYOffRel=0 PrimYVec=0.873328 PrimYVecRel=1.71 PrimZOff=0 PrimZOffRel=0 PrimZVec=0.0733257 PrimZVecRel=-0.06409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

Wing "slat_inboard", child of "slat_in_hinge"
  location (X Y Z) 4.08335 0.564363 -0.584259, rotation -10.1351 -28.6974 -4.26861; relative location -0.127222 -0.094962 0.178783, rotation 27.8758 85.9367 0
  symmetric about XZ
  bounding box size 1.07071 4.54729 0.372787
  totals: TotalSpan=3.42 TotalProjectedSpan=3.41998 TotalChord=1.48084 TotalArea=5.06446
  root: chord 1.84246, twist 0, airfoil file "NASA EET AR12 Lowspeed eta=0.096 slat"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 ThickChord=0.1
  sections:
    n  Span  Root_Chord  Tip_Chord  Area     Sweep   Sweep_Location  Dihedral   Twist     Twist_Location  tip airfoil
    1  1.71  1.84246     1.11921    2.53223  28.862  0               -0.178253  -2.20547  0.25            airfoil file "NASA EET AR12 Lowspeed eta=0.383 slat"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 ThickChord=0.1

Blank "vane_in_ref", child of "eta_097"
  location (X Y Z) 5.69 0.584065 -0.397778, rotation 5 1.472 0; relative location 1.5094 0.00074 0.0038, rotation 0 0 0

Custom "vane_in_track", child of "vane_in_ref"
  location (X Y Z) 5.8651 0.585402 -0.412424, rotation 5.64318 1.47191 -0.124178; relative location 0.175416 5.53536e-05 -0.010204, rotation 0.642967 0 -0.107656
  bounding box size 0.0137724 1.7027 0.178074
  Deflect: Inboard_DX=0.175416 Inboard_DZ=-0.010204 Outboard_DX=0.178629 Outboard_DZ=0.008985
  Design: Length=1.71
  custom script FlapTrack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

Hinge "vane_in_hinge", child of "vane_in_track"
  location (X Y Z) 5.8651 0.585402 -0.412424, rotation -75.4412 -82.5636 -81.0093; relative location 0 0 0, rotation -92.4683 -82.7714 -92.4881
  Hinge: JointRotMax=360 JointRotMaxFlag=0 JointRotMin=-360 JointRotMinFlag=0 JointRotate=20.3393 JointRotateFlag=1 JointTransMax=1000 JointTransMaxFlag=0 JointTransMin=-1000 JointTransMinFlag=0 JointTranslate=0 JointTranslateFlag=0 OrientRotFlag=1 PrimOffAbsRelFlag=1 PrimType=0 PrimULoc=0 PrimVecAbsRelFlag=1 PrimWLoc=0 PrimXOff=0 PrimXOffRel=0 PrimXVec=0.127836 PrimXVecRel=0.21785 PrimYOff=0 PrimYOffRel=0 PrimYVec=0.987241 PrimYVecRel=1.7192 PrimZOff=0 PrimZOffRel=0 PrimZVec=0.0949405 PrimZVecRel=0.00119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

Wing "vane_inboard", child of "vane_in_hinge"
  location (X Y Z) 4.46071 0.52218 0.137122, rotation 8.38091 21.6357 -0.667099; relative location 0.00438218 -0.189772 1.49742, rotation -172.778 89.687 -180
  symmetric about XZ
  bounding box size 0.458169 4.58303 0.258799
  totals: TotalSpan=3.42 TotalProjectedSpan=3.41998 TotalChord=1.48084 TotalArea=5.06446
  root: chord 1.84246, twist 0, airfoil file "NASA EET AR12 Lowspeed eta=0.096 vane"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 ThickChord=0.1
  sections:
    n  Span  Root_Chord  Tip_Chord  Area     Sweep   Sweep_Location  Dihedral   Twist     Twist_Location  tip airfoil
    1  1.71  1.84246     1.11921    2.53223  28.862  0               -0.178253  -2.20547  0.25            airfoil file "NASA EET AR12 Lowspeed eta=0.383 vane"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 ThickChord=0.1

Blank "flap_in_ref", child of "vane_inboard"
  location (X Y Z) 6.05295 0.592176 -0.479194, rotation 3.03642 20.1413 1.17558; relative location 1.70876 -0.000687126 0.0108028, rotation -5.00164 -1.4664 -0.128321

Custom "flap_in_track", child of "flap_in_ref"
  location (X Y Z) 6.07387 0.593861 -0.500479, rotation 3.08541 20.1422 1.05759; relative location 0.026999 1.59025e-06 -0.012834, rotation 0.0460042 0 -0.101122
  bounding box size 0.0399688 1.70729 0.113198
  Deflect: Inboard_DX=0.026999 Inboard_DZ=-0.012834 Outboard_DX=0.030017 Outboard_DZ=-0.011461
  Design: Length=1.71
  custom script FlapTrack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

Hinge "flap_in_hinge", child of "flap_in_track"
  location (X Y Z) 6.07387 0.593861 -0.500479, rotation -151.417 -70.0382 -156.518; relative location 0 0 0, rotation -165.26 -50.6675 -168.497
  Hinge: JointRotMax=360 JointRotMaxFlag=0 JointRotMin=-360 JointRotMinFlag=0 JointRotate=-0.27 JointRotateFlag=1 JointTransMax=1000 JointTransMaxFlag=0 JointTransMin=-1000 JointTransMinFlag=0 JointTranslate=0 JointTranslateFlag=0 OrientRotFlag=1 PrimOffAbsRelFlag=1 PrimType=0 PrimULoc=0 PrimVecAbsRelFlag=1 PrimWLoc=0 PrimXOff=0 PrimXOffRel=0 PrimXVec=0.136031 PrimXVecRel=0.213447 PrimYOff=0 PrimYOffRel=0 PrimYVec=0.984585 PrimYVecRel=1.66667 PrimZOff=0 PrimZOffRel=0 PrimZVec=0.109947 PrimZVecRel=0.16915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

Wing "flap_inboard", child of "flap_in_hinge"
  location (X Y Z) 4.4787 0.528067 0.108666, rotation 8.39257 21.359 -0.775603; relative location 1.087 -0.2148 1.30087, rotation -178.488 49.8665 -173.917
  symmetric about XZ
  bounding box size 0.355656 4.59841 0.250937
  totals: TotalSpan=3.42 TotalProjectedSpan=3.41998 TotalChord=1.48084 TotalArea=5.06446
  root: chord 1.84246, twist 0, airfoil file "NASA EET AR12 Lowspeed eta=0.096 flap"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 ThickChord=0.1
  sections:
    n  Span  Root_Chord  Tip_Chord  Area     Sweep   Sweep_Location  Dihedral   Twist     Twist_Location  tip airfoil
    1  1.71  1.84246     1.11921    2.53223  28.862  0               -0.178253  -2.20547  0.25            airfoil file "NASA EET AR12 Lowspeed eta=0.383 flap"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 ThickChord=0.1

Blank "eta_0383", child of "wing_comps"
  location (X Y Z) 5.125 2.29355 -0.253, rotation 5 -0.741 0; relative location 1.26607 2.29763 -0.0120811, rotation 0 -2.614 0

Blank "slat_out_ref", child of "eta_0383"
  location (X Y Z) 5.29655 2.2902 -0.19304, rotation 5 -0.741 0; relative location 0.17231 0.001887 0.0578, rotation 0 0 0

Custom "slat_out_track", child of "slat_out_ref"
  location (X Y Z) 5.15715 2.29486 -0.242841, rotation 5.51647 -0.74097 -0.933806; relative location -0.140031 0.000308259 -0.048211, rotation 0.516423 0 -0.940485
  bounding box size 0.0673299 3.50019 0.348676
  Deflect: Inboard_DX=-0.140031 Inboard_DZ=-0.048211 Outboard_DX=-0.08232 Outboard_DZ=-0.016525
  Design: Length=3.516
  custom script FlapTrack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

Hinge "slat_out_hinge", child of "slat_out_track"
  location (X Y Z) 5.15715 2.29486 -0.242841, rotation -79.0956 -61.1297 -83.9211; relative location 0 0 0, rotation -83.0733 -61.9787 -82.1642
  Hinge: JointRotMax=360 JointRotMaxFlag=0 JointRotMin=-360 JointRotMinFlag=0 JointRotate=-34.3491 JointRotateFlag=1 JointTransMax=1000 JointTransMaxFlag=0 JointTransMin=-1000 JointTransMinFlag=0 JointTranslate=0 JointTranslateFlag=0 OrientRotFlag=1 PrimOffAbsRelFlag=1 PrimType=0 PrimULoc=0 PrimVecAbsRelFlag=1 PrimWLoc=0 PrimXOff=0 PrimXOffRel=0 PrimXVec=0.480114 PrimXVecRel=1.84726 PrimYOff=0 PrimYOffRel=0 PrimYVec=0.8751 PrimYVecRel=3.511 PrimZOff=0 PrimZOffRel=0 PrimZVec=0.0607422 PrimZVecRel=-0.11856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

Wing "slat_outboard", child of "slat_out_hinge"
  location (X Y Z) 5.03854 2.27831 -0.379574, rotation -12.4795 -30.5244 -4.93219; relative location -0.0687572 -0.0797377 0.148165, rotation 27.799 86.3277 0
  symmetric about XZ
  bounding box size 2.02759 11.5431 0.390381
  totals: TotalSpan=7.032 TotalProjectedSpan=7.03009 TotalChord=0.858474 TotalArea=5.79314
  root: chord 1.11667, twist 0, airfoil file "NASA EET AR12 Lowspeed eta=0.383 slat"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 ThickChord=0.1
  sections:
    n  Span   Root_Chord  Tip_Chord  Area        Sweep   Sweep_Location  Dihedral  Twist     Twist_Location  tip airfoil
    1  0.402  1.11667     1.04971    0.435442    28.862  0               -1.42     -0.07764  0.25            airfoil file "NASA EET AR12 Lowspeed eta=0.450 slat"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 ThickChord=0.1
    2  0.006  1.04971     1.04871    0.00629526  28.862  0               0         -0.07928  0.25            as above
    3  1.548  1.04871     0.79084    1.42381     28.862  0               -1.32     -0.50199  0.25            airfoil file "NASA EET AR12 Lowspeed eta=0.710 slat"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 ThickChord=0.1
    4  0.006  0.79084     0.78984    0.00474204  28.862  0               0         -0.50363  0.25            as above
    5  0.852  0.78984     0.64792    0.612486    28.862  0               -1.3      -0.88176  0.25            airfoil file "NASA EET AR12 Lowspeed eta=0.852 slat"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 ThickChord=0.1
    6  0.702  0.64792     0.53098    0.413794    28.862  0               -1.38     -1.34352  0.25            airfoil file "NASA EET AR12 Lowspeed eta=0.970 slat"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 ThickChord=0.1

Blank "eta_0451", child of "wing_comps"
  location (X Y Z) 5.6128 2.70061 -0.220261, rotation 5 -0.81999 0; relative location 1.7537 2.706 0.001, rotation 0 -2.69299 0

Blank "vane_out_ref", child of "eta_0451"
  location (X Y Z) 6.08411 2.70062 -0.2227, rotation 5 -0.82 0; relative location 0.471231 -0.000203961 -0.00917516, rotation 0 -1e-05 0

Custom "vane_out_track", child of "vane_out_ref"
  location (X Y Z) 6.2535 2.70048 -0.217378, rotation 4.83065 -0.819996 1.65261; relative location 0.16945 0.000326227 0.002889, rotation -0.16933 0 1.65503
  bounding box size 0.0546733 1.54283 0.139677
  Deflect: Inboard_DX=0.16945 Inboard_DZ=0.002889 Outboard_DX=0.124741 Outboard_DZ=-0.001684
  Design: Length=1.548
  custom script FlapTrack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

Hinge "vane_out_hinge", child of "vane_out_track"
  location (X Y Z) 6.2535 2.70048 -0.217378, rotation -80.8114 -68.0729 -85.2228; relative location 0 0 0, rotation -84.0398 -66.3531 -83.498
  Hinge: JointRotMax=360 JointRotMaxFlag=0 JointRotMin=-360 JointRotMinFlag=0 JointRotate=21.8837 JointRotateFlag=1 JointTransMax=1000 JointTransMaxFlag=0 JointTransMin=-1000 JointTransMinFlag=0 JointTranslate=0 JointTranslateFlag=0 OrientRotFlag=1 PrimOffAbsRelFlag=1 PrimType=0 PrimULoc=0 PrimVecAbsRelFlag=1 PrimWLoc=0 PrimXOff=0 PrimXOffRel=0 PrimXVec=0.372129 PrimXVecRel=0.672759 PrimYOff=0 PrimYOffRel=0 PrimYVec=0.925874 PrimYVecRel=1.548 PrimZOff=0 PrimZOffRel=0 PrimZVec=0.065406 PrimZVecRel=-0.030588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

Wing "vane_outboard", child of "vane_out_hinge"
  location (X Y Z) 5.56383 2.64404 0.0277608, rotation 13.3559 19.3976 -0.149079; relative location -0.0251345 -0.292873 0.672694, rotation 23.5113 87.3968 0
  symmetric about XZ
  bounding box size 0.796401 8.54168 0.166333
  totals: TotalSpan=3.096 TotalProjectedSpan=3.09515 TotalChord=0.919775 TotalArea=2.84762
  root: chord 1.04871, twist 0, airfoil file "NASA EET AR12 Lowspeed eta=0.450 vane"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 ThickChord=0.1
  sections:
    n  Span   Root_Chord  Tip_Chord  Area     Sweep   Sweep_Location  Dihedral  Twist     Twist_Location  tip airfoil
    1  1.548  1.04871     0.79084    1.42381  28.862  0               -1.34     -0.42271  0.25            airfoil file "NASA EET AR12 Lowspeed eta=0.710 vane"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 ThickChord=0.1

Blank "flap_out_ref", child of "vane_outboard"
  location (X Y Z) 6.4397 2.70954 -0.255004, rotation 13.3559 19.3976 -0.149079; relative location 0.922553 0.000808059 0.0171239, rotation 0 0 0

Custom "flap_out_track", child of "flap_out_ref"
  location (X Y Z) 6.46352 2.714 -0.274098, rotation 13.3436 19.3976 0.147984; relative location 0.02898 1.01438e-05 -0.010585, rotation -0.0116592 0 0.292957
  bounding box size 0.0141201 1.50829 0.368621
  Deflect: Inboard_DX=0.02898 Inboard_DZ=-0.010585 Outboard_DX=0.021065 Outboard_DZ=-0.0109
  Design: Length=1.548
  custom script FlapTrack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

Hinge "flap_out_hinge", child of "flap_out_track"
  location (X Y Z) 6.46352 2.714 -0.274098, rotation -32.8106 -58.8288 -41.6856; relative location 0 0 0, rotation -81.8166 -67.6942 -81.1647
  Hinge: JointRotMax=360 JointRotMaxFlag=0 JointRotMin=-360 JointRotMinFlag=0 JointRotate=-0.962494 JointRotateFlag=1 JointTransMax=1000 JointTransMaxFlag=0 JointTransMin=-1000 JointTransMinFlag=0 JointTranslate=0 JointTranslateFlag=0 OrientRotFlag=1 PrimOffAbsRelFlag=1 PrimType=0 PrimULoc=0 PrimVecAbsRelFlag=1 PrimWLoc=0 PrimXOff=0 PrimXOffRel=0 PrimXVec=0.344224 PrimXVecRel=0.62727 PrimYOff=0 PrimYOffRel=0 PrimYVec=0.936 PrimYVecRel=1.55 PrimZOff=0 PrimZOffRel=0 PrimZVec=0.073582 PrimZVecRel=-0.03663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

Wing "flap_outboard", child of "flap_out_hinge"
  location (X Y Z) 5.58323 2.64696 -0.00577768, rotation 12.9655 18.5042 0.29184; relative location -0.0709095 -0.346022 0.852431, rotation 22.0666 86.658 0
  symmetric about XZ
  bounding box size 0.661176 8.5732 0.179657
  totals: TotalSpan=3.096 TotalProjectedSpan=3.09515 TotalChord=0.919775 TotalArea=2.84762
  root: chord 1.04871, twist 0, airfoil file "NASA EET AR12 Lowspeed eta=0.450 flap"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 ThickChord=0.1
  sections:
    n  Span   Root_Chord  Tip_Chord  Area     Sweep   Sweep_Location  Dihedral  Twist     Twist_Location  tip airfoil
    1  1.548  1.04871     0.79084    1.42381  28.862  0               -1.34     -0.42271  0.25            airfoil file "NASA EET AR12 Lowspeed eta=0.710 flap"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 ThickChord=0.1

Wing "main_and_flap", child of "wing_comps"
  location (X Y Z) 3.86 0 -0.4, rotation 5 1.873 0; relative location 0 0 0, rotation 0 0 0
  symmetric about XZ
  bounding box size 3.80488 11.9777 0.617052
  totals: TotalSpan=12 TotalProjectedSpan=12 TotalChord=1.05094 TotalArea=13.3572
  root: chord 2.1, twist 0, airfoil file "NASA EET AR12 Lowspeed eta=0.000 cruise"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 ThickChord=0.1
  sections:
    n   Span   Root_Chord  Tip_Chord  Area        Sweep   Sweep_Location  Dihedral  Twist     Twist_Location  tip airfoil
    1   0.576  2.1         1.845      1.13616     28.862  0               0         -0.39276  0.25            airfoil file "NASA EET AR12 Lowspeed eta=0.096 cruise"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 ThickChord=0.1
    2   0.006  1.845       1.84246    0.0110624   28.862  0               0         -0.4005   0.25            airfoil file "NASA EET AR12 Lowspeed eta=0.096 main+flap"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 ThickChord=0.1
    3   1.71   1.84246     1.11921    2.53223     28.862  0               0         -2.60597  0.25            airfoil file "NASA EET AR12 Lowspeed eta=0.383 main+flap"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 ThickChord=0.1
    4   0.006  1.11921     1.11667    0.00670764  28.862  0               0         -2.61371  0.25            as above
    5   0.402  1.11667     1.04971    0.435442    28.862  0               0         -2.69135  0.25            airfoil file "NASA EET AR12 Lowspeed eta=0.450 main+flap"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 ThickChord=0.1
    6   0.006  1.04971     1.04871    0.00629526  28.862  0               0         -2.69299  0.25            as above
    7   1.548  1.04871     0.79084    1.42381     28.862  0               0         -3.1157   0.25            airfoil file "NASA EET AR12 Lowspeed eta=0.710 main+flap"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 ThickChord=0.1
    8   0.006  0.79084     0.78984    0.00474204  28.862  0               0         -3.11734  0.25            as above
    9   0.852  0.78984     0.64792    0.612486    28.862  0               0         -3.49547  0.25            airfoil file "NASA EET AR12 Lowspeed eta=0.852 main"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 ThickChord=0.1
    10  0.702  0.64792     0.53098    0.413794    28.862  0               0         -3.95723  0.25            airfoil file "NASA EET AR12 Lowspeed eta=0.970 main"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 ThickChord=0.1
    11  0.006  0.53098     0.52998    0.00318288  28.862  0               0         -3.96118  0.25            airfoil file "NASA EET AR12 Lowspeed eta=0.970 cruise"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 ThickChord=0.1
    12  0.18   0.52998     0.5        0.0926982   28.862  0               0         -4.11495  0.25            airfoil file "NASA EET AR12 Lowspeed eta=1.000 cruise"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 ThickChord=0.1

Fuselage "fuselage"
  location (X Y Z) 0 0 0, rotation 0 0 0
  bounding box size 9.91 1.15 1.15
  Design: Length=9.91
  cross sections:
    n   XLocPercent  YLocPercent  ZLocPercent  shape
    0   0            0            0            point
    1   0.0124       0            0            circle Circle_Diameter=0.3269
    2   0.0245       0            0            circle Circle_Diameter=0.4728
    3   0.0548       0            0            circle Circle_Diameter=0.7414
    4   0.0851       0            0            circle Circle_Diameter=0.9194
    5   0.1256       0            0            circle Circle_Diameter=1.0945
    6   0.2023       0            0            circle Circle_Diameter=1.15
    7   0.3196       0            0            as above
    8   0.3763       0            0            as above
    9   0.4167       0            0            as above
    10  0.4571       0            0            as above
    11  0.4976       0            0            as above
    12  0.538        0            0            as above
    13  0.5784       0            0            as above
    14  0.6189       0            0            as above
    15  0.6593       0            0            as above
    16  0.6997       0            0            as above
    17  1            0            0.015247     point

Wing "htail"
  location (X Y Z) 8.03 0 0, rotation 0 0 0
  symmetric about XZ
  bounding box size 2.28885 4.07546 0.46035
  totals: TotalSpan=4.13833 TotalProjectedSpan=4.07546 TotalChord=1.09333 TotalArea=4.52458
  root: chord 1.6, twist 0, NACA 4-series Camber=0 CamberLoc=0.2 ThickChord=0.095
  sections:
    n  Span     Root_Chord  Tip_Chord  Area     Sweep  Sweep_Location  Dihedral  Twist  Twist_Location  tip airfoil
    1  2.06917  1.6         0.586667   2.26229  35     0.25            10        0      0.25            NACA 4-series Camber=0 CamberLoc=0.2 ThickChord=0.085

Wing "vtail"
  location (X Y Z) 7.6081 0 0.16, rotation 90 0 0
  bounding box size 2.70826 0.208324 2.2167
  totals: TotalSpan=2.2167 TotalProjectedSpan=2.2167 TotalChord=1.14395 TotalArea=2.53579
  root: chord 1.7354, twist 0, NACA 4-series Camber=0 CamberLoc=0.5 ThickChord=0.12
  sections:
    n  Span    Root_Chord  Tip_Chord  Area     Sweep  Sweep_Location  Dihedral  Twist  Twist_Location  tip airfoil
    1  2.2167  1.7354      0.5525     2.53579  40     0.25            0         0      0.25            as above

Fuselage "fairing"
  location (X Y Z) 3.69565 0 -0.275, rotation 0 0 0
  bounding box size 2.5 1.08976 0.600245
  Design: Length=2.5
  cross sections:
    n   XLocPercent  YLocPercent  ZLocPercent  shape
    0   0            0            0            point
    1   1e-05        0            0            rounded rectangle RoundRectXSec_Radius=0.215 RoundedRect_Height=0.43 RoundedRect_Width=0.82
    2   0.103448     0            0            rounded rectangle RoundRectXSec_Radius=0.2875 RoundedRect_Height=0.6 RoundedRect_Width=1
    3   0.172414     0            0            rounded rectangle RoundRectXSec_Radius=0.2875 RoundedRect_Height=0.6 RoundedRect_Width=1.08
    4   0.310345     0            0            as above
    5   0.448276     0            0            as above
    6   0.586207     0            0            as above
    7   0.724138     0            0            as above
    8   0.862069     0            0            as above
    9   0.9999       0            0            rounded rectangle RoundRectXSec_Radius=0.23826 RoundedRect_Height=0.47652 RoundedRect_Width=0.69754
    10  1            0            0            point

VSPAERO settings: Sref=12 bref=12 cref=1.11667 Xcg=5.5 Ycg=0 Zcg=-0.224 AlphaStart=1 AlphaEnd=1 AlphaNpts=1 BetaStart=0 BetaEnd=0 BetaNpts=1 MachStart=0.16 MachEnd=0 MachNpts=1 ReCref=1e+07 Vinf=100 Rho=0.002377
